<?xml version="1.0" encoding="UTF-8"?>
<!--
  File:     Continental_TSIO-520-P.xml
  Author:   Aero-Matic v 0.83

  Inputs:
    name:           Continental_TSIO-520-P
    type:           piston
    power:          310 hp
-->

<piston_engine name="Continental_TSIO-520-P">
  <ram-air-factor>0.1</ram-air-factor>
  <minmp unit="INHG">         18.5 </minmp>
  <maxmp unit="INHG">         35 </maxmp>
  <displacement unit="IN3"> 520.00 </displacement>
  <maxhp>        285.00 </maxhp>
  <cycles>         4.0 </cycles>
  <idlerpm>      600.0 </idlerpm>
  <maxrpm>      2600.0 </maxrpm>
  <sparkfaildrop>  0.1 </sparkfaildrop>
  <volumetric-efficiency> 0.85 </volumetric-efficiency>
  <man-press-lag> 0.1 </man-press-lag>
  <static-friction  unit="HP"> 1.55 </static-friction>
  <starter-torque> 50.00 </starter-torque>
  <starter-rpm> 550 </starter-rpm>
  <stroke unit="IN">  4.0 </stroke>
  <bore unit="IN">    5.25 </bore>
  <cylinders>         6.0  </cylinders>
  <compression-ratio>  7.5 </compression-ratio>
</piston_engine>
